ORIGIN := 1
n := 46
m := 32
A :=
    for j ∈ 1 .. m
        for i ∈ 1 .. n/2
            A[i, j] ← min(-n - i, m - j)
        for i ∈ n/2 + 1 .. n
            A[i, j] ← max(-n - i, m - j)
    A
pr :=
    pr ← 1
    for i ∈ 1 .. m
        sum ← 0
        for j ∈ 1 .. n
            sum ← sum + A[j, i] if A[j, i] < 0
        pr ← pr*sum
    pr
A = [
    -47, -47, -47, -47, -47, -47, -47, -47, -47, -47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;
    -48, -48, -48, -48, -48, -48, -48, -48, -48, -48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;
    -49, -49, -49, -49, -49, -49, -49, -49, -49, -49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;
    -50, -50, -50, -50, -50, -50, -50, -50, -50, -50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;
    -51, -51, -51, -51, -51, -51, -51, -51, -51, -51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;
    -52, -52, -52, -52, -52, -52, -52, -52, -52, -52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;
    -53, -53, -53, -53, -53, -53, -53, -53, -53, -53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;
    -54, -54, -54, -54, -54, -54, -54, -54, -54, -54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;
    -55, -55, -55, -55, -55, -55, -55, -55, -55, -55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;
    -56, -56, -56, -56, -56, -56, -56, -56, -56, -56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]
pr = 1.01155e100
stolbec(m, n, A) :=
    s ← 0
    for i ∈ 1 .. m
        c ← 0
        for j ∈ 1 .. n
            c ← c + 1 if A[j, i] < 0
            break otherwise
        s ← s + 1 if c == n
    s ← augment("Yes", s) if s > 0
    s ← "No" otherwise
    s
reset := stolbec(m, n, A)
reset = "No"
pr :=
    pr ← 1
    for i ∈ 1, 3 .. n
        for j ∈ 1 .. m
            pr ← pr*A[i, j] if A[i, j] < 0
    pr  # error: Произошла ошибка с плавающей запятой.
pr =  # error: Эта переменная неопределена.
